# Пункт 1:
f(t) := exp(2*t)/(5*t)
t := 0.2
f(t) = 1.49182
t := -10 .. 10
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# Пункт 2:
m := 2
o := 1
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# Пункт 3:
m := 1
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m := 4
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# Пункт 4:
m := 2
o := 0.5
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o := 2
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# Пункт 5:
Ф(x) := 2/sqrt(π)*integral(exp(-t^2), t = 0 .. x)
u := 2
t := 0 .. 100
o := 1
f(t) := 1/(t*o*sqrt(2*π))*exp(-(ln(t) - u)^2/(2*o^2))
F(t) := Ф((ln(t) - u)/o)
5.2
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5.3
u := 1
f(t) := 1/(t*o*sqrt(2*π))*exp(-(ln(t) - u)^2/(2*o^2))
F(t) := Ф((ln(t) - u)/o)
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u := 4
f(t) := 1/(t*o*sqrt(2*π))*exp(-(ln(t) - u)^2/(2*o^2))
F(t) := Ф((ln(t) - u)/o)
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5.4
u := 2
o := 0.5
f(t) := 1/(t*o*sqrt(2*π))*exp(-(ln(t) - u)^2/(2*o^2))
F(t) := Ф((ln(t) - u)/o)
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o := 2
f(t) := 1/(t*o*sqrt(2*π))*exp(-(ln(t) - u)^2/(2*o^2))
F(t) := Ф((ln(t) - u)/o)
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